*Heading
Model: Model-1,     Date: 11/27/2025
*Part, name=Part-1
*End Part
*Assembly, name=Assembly
*Instance, name=Part-1-1, part=Part-1
         0.0,          0.0,           0.
*Node
2, -9.619587, 98.49072, -4.5
3, -14.3700427405847, 105.710856918758, -4.5
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*ELEMENT, TYPE=C3D10
2, 257, 251, 181, 190, 1042, 1071, 1072, 1022, 1007, 703
3, 264, 4, 265, 257, 1073, 1074, 1048, 1056, 1075, 1059
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*Nset, nset=piston_bolt
186, 187, 188, 189, 190, 191
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
*Nset, nset=big_end
194, 195, 196, 197, 198, 199
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*Nset, nset=Internal_Selection-1_Fixed-1
215, 216, 196, 789, 759, 790
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*Nset, nset=Internal_Selection-1_Concentrated_Force-1
186, 187, 188, 189, 190, 191
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
*Elset, elset=Internal_Selection-1_Solid_Section-1
2
*Solid section, elset=Internal_Selection-1_Solid_Section-1, material=steel
*End Instance
*End Assembly
*Material, name=steel
*Elastic
CaeGlobals.EquationContainer, CaeGlobals.EquationContainer
*Step
*Static
1, 1
*Boundary
PART-1-1.Internal_Selection-1_Fixed-1, 1, 1, 0
PART-1-1.Internal_Selection-1_Fixed-1, 2, 2, 0
PART-1-1.Internal_Selection-1_Fixed-1, 3, 3, 0
PART-1-1.Internal_Selection-1_Fixed-1, 4, 4, 0
PART-1-1.Internal_Selection-1_Fixed-1, 5, 5, 0
PART-1-1.Internal_Selection-1_Fixed-1, 6, 6, 0
*Cload
PART-1-1.Internal_Selection-1_Concentrated_Force-1, 1, CaeGlobals.EquationContainer
*Node file
RF, U
*El file
S, E
*End step
